#### GENERAL SETTINGS ####
log             log.lammps # append
units           real				# units: 1A, 1fs, kcal, K
boundary        p p p
box             tilt large

#### ATOM SETTINGS ####
atom_style      full
pair_style      lj/cut 12.50
pair_modify     tail yes mix arithmetic
special_bonds   lj/coul 0.0 0.0 1.0
dielectric      1.0

#### LOAD STRUCTURES ####
read_data       data.MFI_CH4
replicate       1 1 1

#### ATOM GROUPINGS ####
group           CH4    type    3
group           fram   type    1:2

#### VARIABLE SETTINGS ####
variable        dt      equal 1.00
variable        tns     equal ${dt}*1000000 # 1 ns=1e6 fs

variable        stemp   equal 298.00
variable        tdamp   equal 100*${dt}
variable        teq     equal ${tns}*1
variable        tdc     equal ${tns}*10
variable        tpr     equal ${dt}*1000

#### COMPUTE SETTINGS ####
compute         CH4Temp CH4 temp
fix             eqCH4 CH4 nvt temp ${stemp} ${stemp} ${tdamp}
fix_modify      eqCH4 temp CH4Temp
neigh_modify    exclude group CH4 CH4

#compute_modify  eqCH4_temp extra/dof 0 # dynamic/dof yes

## PART 1 ##
compute         allTemp all temp
compute         framTemp fram temp
compute         CH4ke CH4 ke
# compute_modify  allTemp extra/dof 0 dynamic/dof yes
# compute_modify  CH4Temp extra/dof 0 dynamic/dof yes
# compute_modify  framTemp extra/dof 0 dynamic/dof yes
# compute_modify  CH4ke extra/dof  0 dynamic/dof yes

## PART 2 ##
variable        CH4Xcm equal xcm(CH4,x)+xcm(CH4,y)+xcm(CH4,z)
variable        CH4Vcm equal vcm(CH4,x)+vcm(CH4,y)+vcm(CH4,z)
thermo_style    custom atoms step temp c_allTemp c_CH4Temp c_framTemp ke c_CH4ke f_eqCH4 # v_CH4Vcm v_CH4Xcm # pe etotal press vol

#### SIMULATION SETTINGS ####
## EQUILIBRIUM ##
reset_timestep  0
thermo          ${tpr}
run             ${teq}

## DATA COLLECTION ##
reset_timestep  0
# dump            alltrj all custom ${tpr} dump.lammpstrj id type x y z
# dump            CH4trj CH4 custom ${tpr} CH4_coords.dat id type x y z
dump            CH4velo CH4 custom ${tpr} CH4_velocities.dat id type vx vy vz fx fy fz
## MARKER THERMO RPINT ##
run             ${tdc}

## END ##
